*Heading
** Job name: Shell-Biaxial Model name: Biaxial
** Generated by: Abaqus/CAE 6.14-1
*Preprint, echo=NO, model=NO, history=NO, contact=NO
**
** PARTS
**
*Part, name=Part-1
*Node
      1,           0.,           0.,           0.
      2,           1.,           0.,           0.
      3,           0.,           1.,           0.
      4,           1.,           1.,           0.
*Element, type=S4
1, 1, 2, 4, 3
*Nset, nset=Set-1, generate
 1,  4,  1
*Elset, elset=Set-1
 1,
** Section: Section-1
*Shell Section, elset=Set-1, material=mat
1., 5
*Transverse Shear
57628., 57628., 0.
*End Part
**
**
** ASSEMBLY
**
*Assembly, name=Assembly
**
*Instance, name=Part-1-1, part=Part-1
*End Instance
**
*Nset, nset=Set-1, instance=Part-1-1
 1, 2
*Elset, elset=Set-1, instance=Part-1-1
 1,
*Nset, nset=Set-2, instance=Part-1-1
 1,
*Nset, nset=Set-3, instance=Part-1-1
 3, 4
*Elset, elset=Set-3, instance=Part-1-1
 1,
*Nset, nset=Set-4, instance=Part-1-1
 3,
*Nset, nset=Set-5, instance=Part-1-1
 2,
*Nset, nset=Set-6, instance=Part-1-1, generate
 2,  4,  1
*Nset, nset=Set-7, instance=Part-1-1
 2, 4
*Elset, elset=Set-7, instance=Part-1-1
 1,
*End Assembly
*Amplitude, name=cyclic_load, definition=EQUALLY SPACED, fixed interval=0.2
             0.,             0.3,           -0.15,            0.15,            -0.3,             0.3
**
** MATERIALS
**
*Material, name=mat
*Elastic
179800., 0.3
*Plastic, hardening=COMBINED, datatype=PARAMETERS, number backstresses=2
 318.5, 11608.2,   145.2,  1026.3,     4.7
*Cyclic Hardening, parameters
 318.5, 100.7,    8.
**
** BOUNDARY CONDITIONS
**
** Name: bot-fix Type: Displacement/Rotation
*Boundary
Set-1, 2, 2
** Name: corner-fix Type: Displacement/Rotation
*Boundary
Set-2, 1, 1
Set-2, 3, 3
** Name: z-fix Type: Displacement/Rotation
*Boundary
Set-6, 3, 3
** ----------------------------------------------------------------
**
** STEP: loading
**
*Step, name=loading, nlgeom=YES, inc=10000
*Static
0.01, 1., 0.01, 0.01
**
** BOUNDARY CONDITIONS
**
** Name: load Type: Displacement/Rotation
*Boundary, amplitude=cyclic_load
Set-3, 2, 2, 0.5
** Name: load-x Type: Displacement/Rotation
*Boundary, amplitude=cyclic_load
Set-7, 1, 1, 0.5
**
** CONTROLS
**
*Controls, reset
*Controls, parameters=field, field=displacement
5e-08, 1e-06, , , 5e-08, , ,
*Controls, parameters=field, field=hydrostatic fluid pressure
5e-08, 1e-06, , , 5e-08, , ,
*Controls, parameters=field, field=rotation
5e-08, 1e-06, , , 5e-08, , ,
*Controls, parameters=field, field=electrical potential
5e-08, 1e-06, , , 5e-08, , ,
**
** OUTPUT REQUESTS
**
*Restart, write, frequency=0
**
** FIELD OUTPUT: F-Output-1
**
*Output, field, variable=PRESELECT, time interval=0.01
**
** HISTORY OUTPUT: H-Output-1
**
*Output, history, time interval=0.01
*Element Output, elset=Set-1
ALPHA1, ALPHA2
*Energy Output, elset=Set-1
ALLAE, ALLCD, ALLDMD, ALLEE, ALLFD, ALLIE, ALLJD, ALLKE, ALLKL, ALLPD, ALLQB, ALLSD, ALLSE, ALLVD, ALLWK, ETOTAL
*End Step
